** written by FreeCAD inp file writer for CalculiX,Abaqus meshes
** highest dimension mesh elements only.

** Nodes
*Node, NSET=Nall
1, 200, -10, 10
2, 0, -10, 10
3, 200, 10, 10
4, 0, 10, 10
5, 200, 10, -10
6, 0, 10, -10
7, 200, -10, -10
8, 0, -10, -10
9, 200, -7.14, -10
10, 200, -4.28, -10
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

** Volume elements
*Element, TYPE=C3D10, ELSET=Evolumes
4785, 4661, 3534, 3667, 2556, 11439, 11440, 11442, 11443, 11441, 11444
4786, 3096, 3095, 1436, 3610, 11445, 11446, 11448, 11449, 11447, 11450
4787, 3676, 3542, 1495, 3678, 11451, 11452, 11454, 11455, 11453, 11456
4788, 1746, 1619, 1620, 3667, 9710, 9327, 9711, 11458, 11457, 11459
4789, 3676, 3542, 3541, 1495, 11451, 11460, 11461, 11454, 11452, 11462
4790, 3645, 4643, 4641, 4221, 11463, 11464, 11466, 11467, 11465, 11468
4791, 3330, 4282, 3209, 3329, 11469, 11470, 11472, 11473, 11471, 11474
4792, 3142, 3143, 3068, 3069, 11475, 11476, 11478, 11479, 11477, 11480
4793, 2410, 4661, 3667, 2556, 11481, 11442, 11482, 11483, 11443, 11444
4794, 2410, 4661, 4664, 3667, 11481, 11484, 11485, 11482, 11442, 11486
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
** Define element set Eall
*ELSET, ELSET=Eall
Evolumes


***********************************************************
** Element sets for materials and FEM element type (solid, shell, beam, fluid)
*ELSET,ELSET=MaterialSolidSolid
Evolumes

***********************************************************
** constraints fixed node sets
** ConstraintFixed
*NSET,NSET=ConstraintFixed
2,
4,
6,
8,
33,
34,
35,
36,
37,
38,
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
** Physical constants for SI(mm) unit system with Kelvins
*PHYSICAL CONSTANTS, ABSOLUTE ZERO=0, STEFAN BOLTZMANN=5.670374419e-11

***********************************************************
** Materials
** see information about units at file end
** FreeCAD material name: Steel-S235JO
** MaterialSolid
*MATERIAL, NAME=MaterialSolid
*ELASTIC
210000,0.3
*EXPANSION, ZERO=0
1.1E-05

***********************************************************
** Sections
*SOLID SECTION, ELSET=MaterialSolidSolid, MATERIAL=MaterialSolid

***********************************************************
** At least one step is needed to run an CalculiX analysis of FreeCAD
*STEP, INC=2000
*STATIC
1.0,1.0,1e-05,1.0

***********************************************************
** Fixed Constraints
** ConstraintFixed
*BOUNDARY
ConstraintFixed,1
ConstraintFixed,2
ConstraintFixed,3


***********************************************************
** constraints force node loads
** ConstraintForce
*CLOAD
** node loads on shape: Pad:Edge10
1,3,-118.3333333333
3,3,-119.1666666667
21,3,-238.3333333333
22,3,-238.3333333333
23,3,-238.3333333333
24,3,-238.3333333333
25,3,-238.3333333333
26,3,-237.5
4763,3,-476.6666666667
4764,3,-476.6666666667
4765,3,-476.6666666667
4766,3,-476.6666666667
4767,3,-476.6666666667
4768,3,-476.6666666667
4769,3,-473.3333333333


***********************************************************
** Outputs --> frd file
*NODE FILE
U
*EL FILE
S, E
** outputs --> dat file
** reaction forces for Constraint fixed
*NODE PRINT, NSET=ConstraintFixed, TOTALS=ONLY
RF

*OUTPUT, FREQUENCY=1
***********************************************************
*END STEP

***********************************************************
** CalculiX Input file
**   written by    --> FreeCAD 1.1.0
**   written on    --> Wed Oct 15 14:48:00 2025
**   file name     --> fem test.FCStd
**   analysis name --> Analysis
**
**
***********************************************************
**  About units:
**  See ccx manual, ccx does not know about any unit.
**  Golden rule: The user must make sure that the numbers they provide have consistent units.
**  The user is the FreeCAD calculix writer module ;-)
**
**  The unit system which is used at Guido Dhondt's company: mm, N, s, K
**  Since Length and Mass are connected by Force, if Length is mm the Mass is in t to get N
**  The following units are used to write to inp file:
**
**  Length: mm (this includes the mesh geometry)
**  Mass: t
**  TimeSpan: s
**  Temperature: K
**
**  This leads to:
**  Force: N
**  Pressure: N/mm^2 == MPa (Young's Modulus has unit Pressure)
**  Density: t/mm^3
**  Gravity: mm/s^2
**  Thermal conductivity: t*mm/K/s^3 == as W/m/K == kW/mm/K
**  Specific Heat: mm^2/s^2/K = J/kg/K == kJ/t/K
**
